OpenVSP model (file version 5), 4 components.
Geometry view with OpenVSP parameter names; values to 6 digits, angles in degrees, lengths in the model's unit.
Overall bounding box: X_Min=0 X_Len=9.12567 Y_Min=-3.75 Y_Len=7.5 Z_Min=-0.500018 Z_Len=2.32611

Wing "V Tail"
  location (X Y Z) 7.5 0 0.326087, rotation 90 0 0
  bounding box size 1.62567 0.150087 1.5
  totals: TotalSpan=1.5 TotalProjectedSpan=1.5 TotalChord=1.05 TotalArea=1.575 TotalAR=1.42857
  root: chord 1.5, twist 0, NACA 4-series Camber=0 CamberLoc=0.2 ThickChord=0.1
  sections:
    n  Span  Root_Chord  Tip_Chord  Area   Sweep    Sweep_Location  Dihedral  Twist  Twist_Location  tip airfoil
    1  1.5   1.5         0.6        1.575  34.3636  0               0         0      0.25            as above

Wing "H Tail"
  location (X Y Z) 7.96196 0 0, rotation 0 0 0
  symmetric about XZ
  bounding box size 1 3 0.100058
  totals: TotalSpan=3 TotalProjectedSpan=3 TotalChord=1 TotalArea=3 TotalAR=3
  root: chord 1, twist 0, NACA 4-series Camber=0 CamberLoc=0.2 ThickChord=0.1
  sections:
    n  Span  Root_Chord  Tip_Chord  Area  Sweep  Sweep_Location  Dihedral  Twist  Twist_Location  tip airfoil
    1  1.5   1           1          1.5   0      0               0         0      0.25            as above

Fuselage "FuselageGeom"
  location (X Y Z) 0 0 0, rotation 0 0 0
  bounding box size 9.0378 1.25003 1.46904
  Design: Length=9.0378
  cross sections:
    n  XLocPercent  YLocPercent  ZLocPercent  shape
    0  0            0            0.005612     point
    1  0.0396975    0            0.005612     circle Circle_Diameter=0.343388
    2  0.173913     0            0            super ellipse Super_Height=1 Super_M=2.14182 Super_M_bot=2.14182 Super_MaxWidthLoc=0 Super_N=2.49091 Super_N_bot=2 Super_TopBotSym=0 Super_Width=1.02273
    3  0.283495     0            0.0269967    super ellipse Super_Height=1.45 Super_M=2.49091 Super_M_bot=2.71136 Super_MaxWidthLoc=0 Super_N=3.99636 Super_N_bot=3.76932 Super_TopBotSym=0 Super_Width=1.25
    4  0.575703     0            0.027        super ellipse Super_Height=1.45 Super_M=3.10182 Super_M_bot=3.10182 Super_MaxWidthLoc=0 Super_N=3.60364 Super_N_bot=3.60364 Super_TopBotSym=0 Super_Width=1.25
    5  0.792463     0            0.012987     circle Circle_Diameter=0.931818
    6  1            0            0.012987     circle Circle_Diameter=0.875

Wing "WingGeom"
  location (X Y Z) 2.93478 0 -0.34, rotation 0 0 0
  symmetric about XZ
  bounding box size 1.97595 7.5 0.233606
  totals: TotalSpan=7.5 TotalProjectedSpan=7.5 TotalChord=1.48196 TotalArea=11.1147 TotalAR=5.06087
  root: chord 1.97595, twist 0, NACA 4-series Camber=0 CamberLoc=0.2 ThickChord=0.118182
  sections:
    n  Span  Root_Chord  Tip_Chord  Area     Sweep    Sweep_Location  Dihedral  Twist  Twist_Location  tip airfoil
    1  3.75  1.97595     0.987973   5.55735  4.27273  0               0         0      0.231818        NACA 4-series Camber=0 CamberLoc=0.2 ThickChord=0.154545

VSPAERO settings: Sref=11.1147 bref=7.5 cref=1.48196 Xcg=0 Ycg=0 Zcg=0 AlphaStart=0 AlphaEnd=10 AlphaNpts=3 BetaStart=0 BetaEnd=0 BetaNpts=1 MachStart=0 MachEnd=0 MachNpts=1 ReCref=1e+07 Vinf=100 Rho=0.002377
